# Fill granular particles into a cylinder
echo            both
atom_style      granular
atom_modify     map array
communicate     single vel yes

boundary        m m m
newton          off

units           si

region          reg block -0.015 0.015 -0.015 0.015 -0.001 0.0554 units box
create_box      1 reg

neighbor        0.001 bin
neigh_modify    delay 0


#material properties required for granular pair styles

fix         m1 all property/global youngsModulus peratomtype 5.e6
fix         m2 all property/global poissonsRatio peratomtype 0.45
fix         m3 all property/global coefficientRestitution peratomtypepair 1 0.3
fix         m4 all property/global coefficientFriction peratomtypepair 1 0.5

#pair style
pair_style  gran model hertz tangential history
pair_coeff  * *

#timestep, gravity
timestep    0.00001
fix         gravi all gravity 9.81 vector 0.0 0.0 -1.0

#walls
fix         zwalls1  all wall/gran model hertz tangential history primitive type 1 zplane 0.0
fix         zwalls2  all wall/gran model hertz tangential history primitive type 1 zplane 0.0553
fix         cylwalls all wall/gran model hertz tangential history primitive type 1 zcylinder 0.0138 0. 0.

#cfd coupling
#fix        cfd all couple/cfd

#particle insertion
region      bc cylinder z 0.0 0.0 0.012 0.02 0.03 units box
fix         pts1 all particletemplate/sphere 1 atom_type 1 density constant 200 radius constant 0.001
fix         pdd1 all particledistribution/discrete 1.  1 pts1 1.0

fix         ins all insert/pack seed 100001 distributiontemplate pdd1 vel constant 0. 0. -1. insert_every once overlapcheck yes all_in yes particles_in_region 1000 region bc

#apply nve integration to all particles that are inserted as single particles
fix         integr all nve/sphere


#screen output
compute         rke all erotate/sphere
thermo_style    custom step atoms ke c_rke vol
thermo          1000
thermo_modify   lost ignore norm no
compute_modify  thermo_temp dynamic yes

#insert the first particles so that dump is not empty
run             1
dump            dmp all custom 1000 post/dump.liggghts_init id type x y z vx vy vz fx fy fz omegax omegay omegaz radius

run             3000 upto
