###############################################
# material properties
include ../DEM/DEMparameters

shell mkdir ../DEM/post
shell mkdir ../DEM/monitor
###############################################

atom_style      granular
atom_modify     map array
communicate     single vel yes

boundary        f f f
newton          off
units           si
processors      1 1 8

region          reg block -${cylrad} ${cylrad} -${cylrad} ${cylrad} 0.0 0.45 units box
create_box      1 reg

neighbor        0.001 bin
neigh_modify    delay 0

#Material properties required for granular pair styles

fix         m1 all property/global youngsModulus peratomtype ${yM}
fix         m2 all property/global poissonsRatio peratomtype ${pR}
fix         m3 all property/global coefficientRestitution peratomtypepair 1 ${rest}
fix         m4 all property/global coefficientFriction peratomtypepair 1 ${fric}
fix         m5 all property/global coefficientRollingFriction peratomtypepair 1 ${roll}
fix         m6 all property/global characteristicVelocity scalar ${cV}

#pair style
pair_style  gran model hertz tangential history rolling_friction cdt
pair_coeff  * *

#timestep, gravity
timestep    ${dt}
fix         gravi all gravity 9.81 vector 0.0 0.0 -1.0

fix zwall1   all wall/gran model hertz tangential history primitive type 1 zplane 0.0
#fix zwall2   all wall/gran model hertz tangential history primitive type 1 zplane 1.3
fix cylwalls all wall/gran model hertz tangential history primitive type 1 zcylinder ${cylrad} 0. 0.

fix         integr all nve/sphere

fix ts_check all check/timestep/gran 10000 0.1 0.1

#screen output
compute         rke all erotate/sphere
thermo_style    custom step atoms ke c_rke vol
thermo          5000
thermo_modify   lost ignore norm no
compute_modify  thermo_temp dynamic yes

fix         pts1 all particletemplate/sphere 1 atom_type 1 density constant ${partDensHeavy} radius constant ${partRad}
fix         pdd1 all particledistribution/discrete 1.0 1 pts1 1.0

region      insReg cylinder z 0. 0. ${cylrad} 0.0 0.45 units box

fix ins0 all insert/pack/dense seed 123 region insReg distributiontemplate pdd1 volumefraction_region 0.57
run 1


region      testReg cylinder z 0. 0. ${cylrad} 0.0 0.3 units box
variable    volfrac equal count(all,testReg)*2.4576e-05
fix volfracoutput all print 1000 "volfrac = ${volfrac}"
#======================================================================
#- settling

variable vcmx equal vcm(all,x)
variable vcmy equal vcm(all,y)
variable vcmz equal vcm(all,z)

variable vave equal sqrt(v_vcmx*v_vcmx+v_vcmy*v_vcmy+v_vcmz*v_vcmz)
print ${vave}

run     100000

label loop
  print "-----> Checking Velocity..."
  if "${vave}<${vthre}" then "jump in.liggghts_init endloop"
  print "-----> v ave ${vave}, v threshold ${vthre}, continuing run"

  run 10000
jump in.liggghts_init loop

label endloop
#======================================================================
set group all density ${partDens}
run 1
region      delReg block -${cylrad} ${cylrad} -${cylrad} ${cylrad} ${fillH} INF units box
run         1 every 1 "delete_atoms region delReg"
fix zwall2   all wall/gran model hertz tangential history primitive type 1 zplane ${fillH}
run 5000
run         1 every 1 "delete_atoms region delReg"
run 5000
write_restart   liggghts.restart
write_dump all custom/vtk ../DEM/finalState.vtk id type radius mass density x y z
print "everything done"
